atom_style atomic
units metal
variable n equal 5
lattice fcc 3.615
region box block 0 $n 0 $n 0 $n units lattice
create_box 1 box
create_atoms 1 region box
pair_style eam
pair_coeff * * Cu_u6.eam
neighbor 0.3 bin
region slice block 1.95 2.05 0 $n 0 $n units lattice
group slice region slice
dump d1 all custom 1 init_Cu.dump id type xs ys zs fx fy fz
run 0
displace_atoms slice move 0.05 0.0 0.0 units box
dump d2 all custom 1 displace_Cu.dump id type xs ys zs fx fy fz
run 0
